// COMSOL Multiphysics 5.1.0.234 model "electrostatics.mph"
// Outline of the model tree

Parameters
  r1 = 50[um]  // Inner radius
  r2 = 150[um]  // Outer radius
  L = 1000[um]  // Rectangular channel length
  V0 = 20[V]  // Electric potential
  xm = -600[um]  // Location of gaussian pulse
  sigma = 20[um]  // Standard deviation of gaussian pulse
  D = 1e-11[m^2/s]  // Species diffusivity
  er_w = 80  // Dielectric constant for water
  ew = er_w*epsilon0_const  // Permittivity of water
  zeta = -0.1[V]  // Zeta potential at channel walls
  rho = 1000[kg/m^3]  // Density
  mu = 1e-3[Pa*s]  // Viscosity
  L_av = 2*L+pi*(r2-r1)  // Total average channel length
  E_av = V0/L_av  // Electric field based on avg. length
  u_av = ew*zeta*E_av/mu  // Avg. slip velocity
  Pe = u_av*(r2-r1)/D  // Peclet number
  Re = u_av*(r2-r1)*rho/mu  // Reynolds number
  c0 = 1[mol/m^3]  // Initial peak concentration
  kk = 0.55228474  // Bezier curve parameter
  RL = 200[um]  // Recovery length
  IL = 700[um]  // Integration length
  P1 = 50[um]  // Optimization parameter 1
  P2 = 50[um]  // Optimization parameter 2
  P3 = 0.5  // Optimization parameter 3
  P4 = 0.5  // Optimization parameter 4
  P5 = 0.5  // Optimization parameter 5

Variables
  var1 "Variables 1"

Geometry
  geom1 "Geometry 1" (2D, length unit µm)
    r1: Rectangle | pos = {-1.5, 0}; type = solid; base = corner; size = {3, 0.1}
    fin: Finalize "Form Union"

Materials
  mat1: Common "Material 1" on domains 1
    def "Basic"
      relpermittivity = er_w
      density = rho
      dynamicviscosity = mu

Physics
  es: Electrostatics on all domains
    dependent variable V
    ccn1: ChargeConservation (default)
    zc1: ZeroCharge (default)
    init1: init "Initial Values 1" (default)
    sfcd1: SurfaceChargeDensity on boundaries 2, 3
  tds: DilutedSpecies "Transport of Diluted Species" on all domains
    dependent variable c
    cdm1: ConvectionDiffusionMigration "Transport Properties 1" (default)
    nflx1: NoFlux (default)
    init1: init "Initial Values 1" (default)
  spf: CreepingFlow on all domains
    dependent variable u = {u, v, w}
    fp1: FluidProperties (default)
    init1: init "Initial Values 1" (default)
    wall1: Wall (default)

Mesh
  mesh1 "Mesh 1" (physics-controlled)
    size: MeshSizeDefault | hauto = 5

Studies
  std1 "Study 1"
    stat: Stationary