// COMSOL Multiphysics 5.1.0.234 model "rbc_dielectrophoresis.mph"
// Outline of the model tree

Geometry
  geom1 "Geometry 1" (2D, length unit m)
    fin: Finalize "Form Union"
  pgeom_fpt "Geometry" (1D, length unit m)
    pt1: Point

Physics
  fpt: FluidParticleTracing "Particle Tracing for Fluid Flow" on all domains
    dependent variable q = {qx, qy, qz}
    wall1: Wall (default)
    pp1: ParticleProperties
      mp = 1E-6[kg]
      rhop = 2200[kg/m^3]
      rhopb = 2200[kg/m^3]
      dp = 1E-6[m]
      ParticlePropertySpec = SpecifyDensityAndDiameter
      Cp = 2200[J/(kg*K)]
      hp = 42000[J/kg]
  spf: CreepingFlow on all domains
    dependent variable u = {u, v, w}
    fp1: FluidProperties (default)
    init1: init "Initial Values 1" (default)
    wall1: Wall (default)
  ec: ConductiveMedia "Electric Currents" on all domains
    dependent variable V
    cucn1: CurrentConservation (default)
    ein1: ElectricInsulation (default)
    init1: init "Initial Values 1" (default)

Mesh
  mesh1 "Mesh 1" (physics-controlled)

Studies
  std1 "Study 1"
    time: Transient "Time Dependent" | tlist = range(0,0.1,1)